// SBML level 2 version 4

model New_Model()
  // New Model_1

  // Compartments:
  compartment compartment = 1;

  // Species:
  species $ATP in compartment = 1;
  species EnvZ in compartment = 1;
  species EnvZ_ATP in compartment = 1; EnvZ_ATP is "EnvZ-ATP";
  species $ADP in compartment = 1;
  species EnvZp in compartment = 1;
  species EnvZp_OmpR in compartment = 1; EnvZp_OmpR is "EnvZp-OmpR";
  species OmpR in compartment = 1;
  species OmpRp in compartment = 1;
  species EnvZ_ATP_OmpRp in compartment = 1; EnvZ_ATP_OmpRp is "EnvZ-ATP-OmpRp";
  species $p in compartment = 1;

  // Reactions:
  EnvZ_autophosphorylation_1: EnvZ + $ATP -> EnvZ_ATP; compartment*(EnvZ_autophosphorylation_1_k1*EnvZ*ATP - EnvZ_autophosphorylation_1_k2*EnvZ_ATP);
    EnvZ_autophosphorylation_1_k1 = 0.1; EnvZ_autophosphorylation_1_k2 = 0.1;
  EnvZ_autophosphorylation_2: EnvZ_ATP => EnvZp + $ADP; compartment*EnvZ_autophosphorylation_2_k1*EnvZ_ATP;
    EnvZ_autophosphorylation_2_k1 = 0.1;
  OmpR_phosphorylation_1: EnvZp + OmpR -> EnvZp_OmpR; compartment*(OmpR_phosphorylation_1_k1*EnvZp*OmpR - OmpR_phosphorylation_1_k2*EnvZp_OmpR);
    OmpR_phosphorylation_1_k1 = 0.1; OmpR_phosphorylation_1_k2 = 0.1;
  OmpR_phosphorylation_2: EnvZp_OmpR => EnvZ + OmpRp; compartment*OmpR_phosphorylation_2_k1*EnvZp_OmpR;
    OmpR_phosphorylation_2_k1 = 0.1;
  OmpR_dephosphorylation_1: EnvZ_ATP + OmpRp -> EnvZ_ATP_OmpRp; compartment*(OmpR_dephosphorylation_1_k1*EnvZ_ATP*OmpRp - OmpR_dephosphorylation_1_k2*EnvZ_ATP_OmpRp);
    OmpR_dephosphorylation_1_k1 = 0.1; OmpR_dephosphorylation_1_k2 = 0.1;
  OmpR_dephosphorylation_2: EnvZ_ATP_OmpRp => EnvZ_ATP + OmpR + $p; compartment*OmpR_dephosphorylation_2_k1*EnvZ_ATP_OmpRp;
    OmpR_dephosphorylation_2_k1 = 0.1;

  // Unit definitions:
  unit length = metre;
  unit area = metre^2;
  unit volume = litre;
  unit time = second;
  unit substance = mole;
end
